# LAMMPS input script
units         metal
atom_style    full
boundary      p p p

# Read data
read_restart  equilibration.restart

reset_timestep 0

# Define masses
mass 1 15.9994   # Oxygen
mass 2 1.008     # Hydrogen

# Load deepmd potential
plugin load  libdeepmd_lmp.so
pair_style   deepmd graph.pb
pair_coeff  * * H O

# Variables
variable      dt equal 0.25e-3 # ps
variable      t_decorr equal 100e-3 # ps
variable      n_decorr equal ${t_decorr}/${dt}
variable      n_frames equal 3000
variable      n_steps equal ${n_decorr}*${n_frames}
variable      T equal 300.0 # K

# Define timestep and run settings
timestep      ${dt}

# Initialize velocities for the molecule
velocity      all create $T 5463576 mom yes rot yes dist gaussian
fix           1 all momentum 1 linear 1 1 1 angular

# Thermostat
fix           NVT all nvt temp $T $T $(100.0*dt)

# Thermodynamic output
thermo_style  custom step temp press etotal density pe ke spcpu
thermo_modify temp NVT_temp
thermo        1000

# save data
dump          1 all custom ${n_decorr} dynamics.lammpstraj type element x y z fx fy fz
dump_modify   1 element O H sort id
fix           3 all print ${n_decorr} "$(etotal)" file energies.dat screen no

print         "Running ${n_steps} steps"
print         "Decorraltion steps: ${n_decorr}"
run           ${n_steps}

write_data    dynamics.data
write_restart dynamics.restart

# https://docs.lammps.org/Manual.html
